<Lems xmlns="http://www.neuroml.org/lems/0.7.2"
    xmlns:xsi="http://www.w3.org/2001/XMLSchema-instance"
    xsi:schemaLocation="http://www.neuroml.org/lems/0.7.2 https://raw.githubusercontent.com/LEMS/LEMS/development/Schemas/LEMS/LEMS_v0.7.2.xsd">

    <Target component="sim1" reportFile="simulator.props" timesFile="time.dat"/>

    <!--Include standard NeuroML 2 ComponentType definitions-->

    <Include file="Cells.xml"/>
    <Include file="Networks.xml"/>
    <Include file="Simulation.xml"/>

    <!--   Channel/synapse files-->
    <Include file="../../channels/Kd.channel.nml"/>
    <Include file="../../channels/IM.channel.nml"/>
    <Include file="../../channels/LeakConductance.channel.nml"/>
    <Include file="../../channels/Na.channel.nml"/>
    <Include file="../../channels/CalciumPool.nml"/>
    <Include file="../../channels/IL.channel.nml"/>

    <!--   Cell files-->
    <Include file="IB.cell.nml"/>
    <!--   Network file-->
    <Include file="IB.net.nml"/>

    <Component type="Simulation" id="sim1" length="3000.0ms" step="0.005ms" target="network_PospischilEtAl2008">

<!--        <Display id="CG_IB_ModelDB_v" title="PospischilEtAl2008: Default Simulation Configuration, CG_IB_ModelDB, VOLTAGE" xmin="-10" xmax="3010" ymin="-100" ymax="70" timeScale="1ms">-->
<!--            <Line id="v" timeScale="1 ms" quantity="CG_IB_ModelDB/0/IB_ModelDB/v" scale="1 mV" color="#000000"/>-->
<!--        </Display>-->

        <Display id="CG_IB_ModelDB_test" title="PospischilEtAl2008: Default Simulation Configuration, CG_IB_ModelDB, VOLTAGE" xmin="450" xmax="700" ymin="-100" ymax="70" timeScale="1ms">
            <Line id="v" timeScale="1 ms" quantity="CG_IB_ModelDB/0/IB_ModelDB/v" scale="1 mV" color="#000000"/>
        </Display>

        <OutputFile id="CG_IB_ModelDB_v_0_0_OF" fileName="IB.dat">
            <OutputColumn id="v" quantity="CG_IB_ModelDB/0/IB_ModelDB/v"/>
        </OutputFile>

    </Component>

</Lems>
