<?xml version="1.0" encoding="ISO-8859-1"?>
<neuroml xmlns="http://www.neuroml.org/schema/neuroml2" xmlns:xsi="http://www.w3.org/2001/XMLSchema-instance" xsi:schemaLocation="http://www.neuroml.org/schema/neuroml2 https://raw.github.com/NeuroML/NeuroML2/development/Schemas/NeuroML2/NeuroML_v2beta4.xsd" id="IT">

    <notes>ChannelML file containing a single Channel description</notes>

    <ionChannel id="IT" conductance="0 pS" type="ionChannelHH" species="ca">

        <notes>ChannelML file containing a single Channel description</notes>

        <annotation>
            <rdf:RDF xmlns:rdf="http://www.w3.org/1999/02/22-rdf-syntax-ns#">
                <rdf:Description rdf:about="IT">

                    <bqmodel:isDescribedBy xmlns:bqmodel="http://biomodels.net/model-qualifiers/">
                        <rdf:Bag>
                            <rdf:li>....</rdf:li>
                            <rdf:li rdf:resource="..."/>
                        </rdf:Bag>
                    </bqmodel:isDescribedBy>

                    <bqbiol:isVersionOf xmlns:bqbiol="http://biomodels.net/biology-qualifiers/">
                        <rdf:Bag>
                            <rdf:li>K channels</rdf:li>
                            <rdf:li rdf:resource="http://senselab.med.yale.edu/senselab/NeuronDB/channelGene2.htm#table3"/>
                        </rdf:Bag>
                    </bqbiol:isVersionOf>

                </rdf:Description>
            </rdf:RDF>
        </annotation>

        <gate id="s" type="IT_s_gate" instances="2">
            <steadyState type="IT_s_inf_inf"/>
            <timeCourse type="fixedTimeCourse" tau="0ms"/>
        </gate>

        <gate id="u" type="gateHHtauInf" instances="1">
            <q10Settings type="q10ExpTemp" q10Factor="3" experimentalTemp="24 degC"/>
            <timeCourse type="IT_u_tau_tau"/>
            <steadyState type="IT_u_inf_inf"/>
        </gate>

    </ionChannel>

    <ComponentType name="IT_s_gate" extends="gateHHtauInf">

        <Exposure name="tau" dimension="time"/>
        <Exposure name="inf" dimension="none" />

        <Dynamics>
            <DerivedVariable name="inf" dimension="none" exposure="inf" select="steadyState/x" />
            <DerivedVariable name="fcond" exposure="fcond" dimension="none" value="inf^instances" />

            <DerivedVariable name="q" exposure="q" dimension="none" value="inf" />
            <DerivedVariable name="tau" exposure="tau" dimension="none" value="0" />
            <DerivedVariable name="rateScale" exposure="rateScale" dimension="none" value="1" />
        </Dynamics>

    </ComponentType>

    <ComponentType name="IT_s_inf_inf" extends="baseVoltageDepVariable">

        <Constant name="VOLT_SCALE" dimension="voltage" value="1 mV"/>

        <Dynamics>
            <DerivedVariable name="Vm" dimension="none" value="(v / VOLT_SCALE)"/>
            <DerivedVariable name="x" exposure="x" dimension="none" value="1.0 / ( 1 + exp(-(Vm + 2 +57)/6.2) )" />
        </Dynamics>

    </ComponentType>

    <ComponentType name="IT_u_tau_tau" extends="baseVoltageDepTime">

        <Constant name="TIME_SCALE" dimension="time" value="1 ms"/>
        <Constant name="VOLT_SCALE" dimension="voltage" value="1 mV"/>

        <Dynamics>
            <DerivedVariable name="Vm" dimension="none" value="(v / VOLT_SCALE)+2"/>
            <DerivedVariable name="t" exposure="t" dimension="time"
                value="(30.8 + (211.4 + exp((Vm+113.2)/5)) / (1 + exp((Vm+84)/3.2))) * TIME_SCALE"/>
        </Dynamics>

    </ComponentType>

    <ComponentType name="IT_u_inf_inf" extends="baseVoltageDepVariable">

        <Constant name="VOLT_SCALE" dimension="voltage" value="1 mV"/>

        <Dynamics>
            <DerivedVariable name="Vm" dimension="none" value="(v / VOLT_SCALE)"/>
            <DerivedVariable name="x" exposure="x" dimension="none" value="1.0 / ( 1 + exp((Vm + 2  + 81)/4.0) )" />
        </Dynamics>

    </ComponentType>

</neuroml>
