<?xml version="1.0" encoding="UTF-8"?>
<channelml xmlns="http://morphml.org/channelml/schema"
    xmlns:xsi="http://www.w3.org/2001/XMLSchema-instance"
    xmlns:meta="http://morphml.org/metadata/schema"
    xsi:schemaLocation="http://morphml.org/channelml/schema  http://www.neuroml.org/NeuroMLValidator/NeuroMLFiles/Schemata/v1.8.1/Level2/ChannelML_v1.8.1.xsd"
    units="Physiological Units">

    <meta:notes>ChannelML file containing a single Channel description</meta:notes>

    <channel_type name="Na_CML" density="yes">

        <status value="in_progress">
            <meta:contributor>
                <meta:name>Padraig Gleeson</meta:name>
            </meta:contributor>
        </status>

        <meta:notes>...</meta:notes>

        <meta:authorList>
            <meta:modelTranslator>
                <meta:name>Padraig Gleeson</meta:name>
                <meta:institution>UCL</meta:institution>
                <meta:email>p.gleeson - at - ucl.ac.uk</meta:email>
            </meta:modelTranslator>
        </meta:authorList>

        <meta:publication>
            <meta:fullTitle>....</meta:fullTitle>
            <meta:pubmedRef>...</meta:pubmedRef>
        </meta:publication>

        <meta:neuronDBref>
            <meta:modelName>Na channels</meta:modelName>
            <meta:uri>http://senselab.med.yale.edu/senselab/NeuronDB/channelGene2.htm#table2</meta:uri>
        </meta:neuronDBref>

        <parameters>
            <parameter name="VT" value ="-55"/>
        </parameters>

        <current_voltage_relation cond_law="ohmic" ion="na" default_erev="50" default_gmax="120">

            <gate name="m" instances="3">
                <closed_state id="m0"/>
                <open_state id="m"/>

                <transition name="alpha" from="m0" to="m" expr_form="generic" expr="-0.32 * ( (v - VT) - 13 ) / ( (exp (-1*( (v - VT) - 13 ) / 4)) - 1)"/>
                <transition name="beta" from="m" to="m0" expr_form="generic" expr="0.28 * ( (v - VT) - 40 ) / ((exp (( (v - VT) - 40 ) / 5)) - 1)"/>
            </gate>

            <gate name="h" instances="1">
                <closed_state id="h0"/>
                <open_state id="h"/>

                <transition name="alpha" from="h0" to="h" expr_form="generic" expr="0.128 * (exp (-1*( (v - VT) - 17 ) / 18))"/>
                <transition name="beta" from="h" to="h0" expr_form="generic" expr="4 / ( 1 + (exp (-1*( (v - VT) - 40 ) / 5)))"/>
            </gate>

        </current_voltage_relation>

    </channel_type>
</channelml>
